# Полином Лагранжа:
x := 0.87
x0 := 0.85
y0 := -1.463
x1 := 0.9
y1 := -1.077
x2 := 0.8
y2 := -1.816
x3 := 0.95
y3 := -0.6565
L1(x) := (x - x1)/(x0 - x1)*y0 + (x - x0)/(x1 - x0)*y1 → 7.72*x - 8.025
L2(x) := (x - x1)*(x - x2)/((x0 - x1)*(x0 - x2))*y0 + (x - x0)*(x - x2)/((x1 - x0)*(x1 - x2))*y1 + (x - x1)*(x - x0)/((x2 - x0)*(x2 - x1))*y2 → 585.2*(x - 0.8)*(x - 0.9) + (-363.2*(x - 0.85)*(x - 0.9)) + (-215.4*(x - 0.8)*(x - 0.85))
L3(x) := (x - x1)*(x - x2)*(x - x3)/((x0 - x1)*(x0 - x2)*(x0 - x3))*y0 + (x - x0)*(x - x2)*(x - x3)/((x1 - x0)*(x1 - x2)*(x1 - x3))*y1 + (x - x1)*(x - x0)*(x - x3)/((x2 - x1)*(x2 - x0)*(x2 - x3))*y2 + (x - x1)*(x - x2)*(x - x0)/((x3 - x1)*(x3 - x2)*(x3 - x0))*y3 → 4308.0*(x - 0.8)*(x - 0.85)*(x - 0.95) + 2421.33333333*(x - 0.85)*(x - 0.9)*(x - 0.95) + (-5852.0*(x - 0.8)*(x - 0.9)*(x - 0.95)) + (-875.333333333*(x - 0.8)*(x - 0.85)*(x - 0.9))
|L2(x) - L1(x)| → 0.00396
L3(x0) = -1.463
|L3(x) - L2(x)| → 0.000084
# Полином Ньютона
x := 0.46
x0 := 0.45
y0 := -3.489
x1 := 0.5
y1 := -3.325
x2 := 0.55
dy0 := y1 - y0 → 0.164
y2 := -3.1385
dy1 := y2 - y1 → 0.1865
x3 := 0.6
d2y0 := dy1 - dy0 → 0.0225
y3 := -2.928
dy2 := y3 - y2 → 0.2105
h := x1 - x0
d2y1 := dy2 - dy1 → 0.024
d3y0 := d2y1 - d2y0 → 0.0015
P1(x) := y0 + dy0/(1!*h^1)*(x - x0) → 3.28*x - 4.965
P1(x) = -3.4562
P2(x) := y0 + dy0/(1!*h^1)*(x - x0) + d2y0/(2!*h^2)*(x - x0)*(x - x1) → 3.28*x + (4.5*x - 2.025)*(x - 0.5) - 4.965
P2(x) = -3.458
|P2(x) - P1(x)| → 0.0018
P3(x) := y0 + dy0/(1!*h^1)*(x - x0) + d2y0/(2!*h^2)*(x - x0)*(x - x1) + d3y0/(3!*h^3)*(x - x0)*(x - x1)*(x - x2) → 3.28*x + (4.5*x - 2.025)*(x - 0.5) + (2*x - 0.9)*(x - 0.5)*(x - 0.55) - 4.965
P3(x) = -3.45793
|P3(x) - P2(x)| → 0.000072
e^1.5 = 4.48169
