f(x) := cos(x) - (x + 2)^(1/2) + 1
x := -1, -0.8 .. 2
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f1(x) := d/dx(f(x)) → -sin(x) - 1/(2*sqrt(x + 2))
f2(x) := d/dx(f1(x)) → 1/(4*(x + 2)^(3/2)) - cos(x)
x = [-1; -0.8; -0.6; -0.4; -0.2; 0; 0.2; 0.4; 0.6; 0.8; 1; 1.2; 1.4; 1.6; 1.8; 2]
f(x) = [0.540302; 0.601262; 0.64212; 0.65615; 0.638426; 0.585786; 0.496827; 0.371868; 0.212884; 0.0233867; -0.191749; -0.426497; -0.673942; -0.926566; -1.17656; -1.41615]
f1(x) = [0.341471; 0.260921; 0.142065; -0.00586637; -0.174009; -0.353553; -0.535769; -0.712167; -0.874729; -1.01616; -1.13015; -1.21155; -1.25661; -1.2631; -1.23034; -1.1593]
f2(x) = [-0.290302; -0.506525; -0.674415; -0.797535; -0.876545; -0.911612; -0.903453; -0.853822; -0.765704; -0.643348; -0.49219; -0.318685; -0.13009; 0.0658; 0.260951; 0.447397]
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x0 := 1.5
f(x0) = -0.800091
x1 := x0 - f(x0)/f1(x0)
x1 = 0.867395
f(x1) = -0.0465227
x2 := x1 - f(x1)/f1(x1)
f(x2) = -0.000585959
x2 = 0.823419
x3 := x2 - f(x2)/f1(x2)
f(x3) = -1.01281e-7
x3 = 0.822851
f2(1.5)*(x3 - x2)/(2*f1(1.5)) = -7.31475e-6
ф(x) := ((cos(x) + 1)^2 - 2)/1.26529467313 + x
ф1(x) := d/dx(ф(x)) → -1.58065946413*sin(x)*(cos(x) + 1) + 1
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x = [-1; -0.8; -0.6; -0.4; -0.2; 0; 0.2; 0.4; 0.6; 0.8; 1; 1.2; 1.4; 1.6; 1.8; 2]
ф1(x) = [3.04872; 2.92389; 2.62913; 2.18249; 1.6218; 1; 0.378203; -0.182486; -0.629126; -0.923888; -1.04872; -1.00708; -0.822412; -0.533851; -0.189584; 0.160834]
x0 := 0
f(x0) = 0.585786
x1 := ф(x0) → 1.58065946413
f(x1) = -0.902126
x2 := ф(x1) → 0.774816605416
f(x2) = 0.0487713
x3 := ф(x2) → 1.51747322165
f(x3) = -0.822195
x4 := ф(x3) → 0.813634281545
f(x4) = 0.0094725
x5 := ф(x4) → 1.48185975426
f(x5) = -0.777155
x6 := ф(x5) → 0.838158025543
f(x6) = -0.0158501
